*Heading
** Job name: new_mass_dists_pos_mesh Model name: Final_Model
** Generated by: Abaqus/CAE 2017
*Preprint, echo=NO, model=NO, history=NO, contact=NO
**
** PARTS
**
**  Back Up of all features for the two rotations of the left and right muscles.
*Part, name=LEFT_DISC
*Node
  18869,   -37.226326,   -24.309967,   55.7016945
  18874,  -40.8917809,  -23.2130051,   55.2870483
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*Element, type=C3D4
90911, 20794, 21552, 20975, 21547
90912, 21835, 20787, 20982, 20981
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*Elset, elset=LEFT_DISC, generate
 90911,  96253,      1
*Elset, elset=_PICKEDSET4, internal, generate
 90911,  96253,      1
*Elset, elset=_LEFT_DISC_S1, internal
 90928, 90978, 90993, 91043, 91051, 91055
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*Elset, elset=_LEFT_DISC_S2, internal
 90942, 90985, 91019, 91039, 91068, 91191
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*Elset, elset=_LEFT_DISC_S3, internal
 90912, 90914, 90918, 90921, 90922, 90929
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*Elset, elset=_LEFT_DISC_S4, internal
 90916, 90939, 90943, 90964, 90994, 90998
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*Elset, elset=_LEFT_DISC_S1_1, internal
 90928, 90978, 90993, 91043, 91051, 91055
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*Elset, elset=_LEFT_DISC_S2_1, internal
 90942, 90985, 91019, 91039, 91068, 91191
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*Elset, elset=_LEFT_DISC_S4_1, internal
 90916, 90939, 90943, 90964, 90994, 90998
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*Elset, elset=_LEFT_DISC_S3_1, internal
 90912, 90914, 90918, 90921, 90922, 90929
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*Surface, type=ELEMENT, name=LEFT_DISC
_LEFT_DISC_S1_1, S1
_LEFT_DISC_S2_1, S2
_LEFT_DISC_S4_1, S4
_LEFT_DISC_S3_1, S3
*Elset, elset=_LEFT_DISC_BOTTSURF_S1_1, internal
 90993, 91043, 91055, 91071, 91227, 91344
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*Elset, elset=_LEFT_DISC_BOTTSURF_S2_1, internal
 90985, 91326, 91342, 92555, 92663, 92847, 93294, 93762
*Elset, elset=_LEFT_DISC_BOTTSURF_S4_1, internal
 90943, 90994, 91179, 91300, 91324, 91396
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*Elset, elset=_LEFT_DISC_BOTTSURF_S3_1, internal
 90921, 90938, 90971, 90974, 90983, 91042
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*Surface, type=ELEMENT, name=LEFT_DISC_BOTTSURF
_LEFT_DISC_BOTTSURF_S1_1, S1
_LEFT_DISC_BOTTSURF_S2_1, S2
_LEFT_DISC_BOTTSURF_S4_1, S4
_LEFT_DISC_BOTTSURF_S3_1, S3
*Elset, elset=_LEFT_DISC_TOPSURF_S1_1, internal
 91086, 91143, 91199, 91214, 91254, 91257
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*Elset, elset=_LEFT_DISC_TOPSURF_S2_1, internal
 91519, 91589, 91903, 92022, 92077, 92106, 92134, 92144, 92258, 92464, 92729, 93117, 93125, 93946, 94301
*Elset, elset=_LEFT_DISC_TOPSURF_S4_1, internal
 90939, 90964, 91008, 91093, 91125, 91169
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*Elset, elset=_LEFT_DISC_TOPSURF_S3_1, internal
 90914, 90935, 90947, 90949, 90952, 90976
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*Surface, type=ELEMENT, name=LEFT_DISC_TOPSURF
_LEFT_DISC_TOPSURF_S1_1, S1
_LEFT_DISC_TOPSURF_S2_1, S2
_LEFT_DISC_TOPSURF_S4_1, S4
_LEFT_DISC_TOPSURF_S3_1, S3
** Section: Section-3-_PICKEDSET4
*Solid Section, elset=_PICKEDSET4, controls=EC-1, material=DISC
,
*End Part
**
*Part, name=LEFT_FOSSA
*Node
      1,   8.57108021,  -65.3487015,  -40.6257019
      2,   8.91501999,  -64.6300964,  -38.3908005
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*Element, type=C3D4
1281, 307, 308, 288, 347
1282, 308, 288, 330, 304
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*Elset, elset=LEFT_FOSSA, generate
 1281,  3751,     1
*Elset, elset=LEFT_FOSSA_TOP
 1287, 1292, 1310, 1321, 1330, 1331
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*Elset, elset=_LEFT_FOSSA_S1, internal
 1287, 1290, 1294, 1295, 1296, 1305
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*Elset, elset=_LEFT_FOSSA_S2, internal
 1282, 1292, 1297, 1300, 1301, 1306
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*Elset, elset=_LEFT_FOSSA_S3, internal
 1283, 1284, 1289, 1296, 1297, 1303
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*Elset, elset=_LEFT_FOSSA_S4, internal
 1285, 1291, 1298, 1310, 1317, 1325
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*Elset, elset=_PICKEDSET22, internal, generate
 1281,  3751,     1
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*Elset, elset=_LEFT_FOSSA_S1_9, internal
 1287, 1290, 1294, 1295, 1296, 1305
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*Elset, elset=_LEFT_FOSSA_S2_9, internal
 1282, 1292, 1297, 1300, 1301, 1306
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*Elset, elset=_LEFT_FOSSA_S4_9, internal
 1285, 1291, 1298, 1310, 1317, 1325
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*Elset, elset=_LEFT_FOSSA_S3_9, internal
 1283, 1284, 1289, 1296, 1297, 1303
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*Surface, type=ELEMENT, name=LEFT_FOSSA
_LEFT_FOSSA_S1_9, S1
_LEFT_FOSSA_S2_9, S2
_LEFT_FOSSA_S4_9, S4
_LEFT_FOSSA_S3_9, S3
** Section: Section-4-_PICKEDSET22
*Solid Section, elset=_PICKEDSET22, controls=EC-1, material=CORTICAL
,
*End Part
**
*Part, name=Left-Masseter
*End Part
**
*Part, name=PART-1
*Node
      1,  -42.2870827,  -2.72262788,  -5.58885717
      2,   -42.588604, -0.175533995,  -7.25962973
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*Element, type=R3D3
    1,     1,     2,     3
    2,     4,     5,     6
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*Node
  40872,   10.6099997,   19.5499992,   11.9499998
*Nset, nset=PART-1-RefPt_, internal
40872,
*Nset, nset=rp
 40872,
*Nset, nset=ALL
     1,     2,     3,     4,     5,     6
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*Elset, elset=PART-1, generate
     1,  15334,      1
*End Part
**
*Part, name=RIGHT_DISC
*Node
  10845,   58.1358528,  -23.3995056,   54.9962807
  10854,   63.8738174,  -22.2766018,   55.2197723
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*Element, type=C3D4
41260, 13800, 13285, 13171, 13788
41261, 13755, 13218, 13784, 13179
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*Elset, elset=RIGHT_DISC, generate
 41260,  46371,      1
*Elset, elset=_RIGHT_DISC_S1, internal
 41281, 41286, 41351, 41410, 41412, 41439
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*Elset, elset=_RIGHT_DISC_S2, internal
 41303, 41415, 41493, 41525, 41567, 41610
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*Elset, elset=_RIGHT_DISC_S3, internal
 41264, 41270, 41271, 41275, 41278, 41289
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*Elset, elset=_RIGHT_DISC_S4, internal
 41290, 41297, 41322, 41330, 41340, 41357
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*Elset, elset=_RIGHT_DISC_BOTTSURF_S1, internal
 41351, 41439, 41470, 41523, 41713, 41743
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*Elset, elset=_RIGHT_DISC_S1_1, internal
 41281, 41286, 41351, 41410, 41412, 41439
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*Elset, elset=_RIGHT_DISC_S2_1, internal
 41303, 41415, 41493, 41525, 41567, 41610
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*Elset, elset=_RIGHT_DISC_S4_1, internal
 41290, 41297, 41322, 41330, 41340, 41357
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*Elset, elset=_RIGHT_DISC_S3_1, internal
 41264, 41270, 41271, 41275, 41278, 41289
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*Surface, type=ELEMENT, name=RIGHT_DISC
_RIGHT_DISC_S1_1, S1
_RIGHT_DISC_S2_1, S2
_RIGHT_DISC_S4_1, S4
_RIGHT_DISC_S3_1, S3
*Elset, elset=_RIGHT_DISC_BOTTSURF_S1_1, internal
 41351, 41439, 41470, 41523, 41713, 41743
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*Elset, elset=_RIGHT_DISC_BOTTSURF_S2_1, internal
 41610, 42404, 42477, 42521, 42760, 43193, 43920, 44078, 44120, 44337, 44636, 45002
*Elset, elset=_RIGHT_DISC_BOTTSURF_S4_1, internal
 41322, 41448, 41536, 41539, 41652, 41700
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*Elset, elset=_RIGHT_DISC_BOTTSURF_S3_1, internal
 41264, 41289, 41296, 41321, 41332, 41339
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*Surface, type=ELEMENT, name=RIGHT_DISC_BOTTSURF
_RIGHT_DISC_BOTTSURF_S1_1, S1
_RIGHT_DISC_BOTTSURF_S2_1, S2
_RIGHT_DISC_BOTTSURF_S4_1, S4
_RIGHT_DISC_BOTTSURF_S3_1, S3
*Elset, elset=_RIGHT_DISC_TOPSURF_S1_1, internal
 41410, 41412, 41501, 41509, 41540, 41574
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*Elset, elset=_RIGHT_DISC_TOPSURF_S2_1, internal
 41415, 41990, 42407, 44767
*Elset, elset=_RIGHT_DISC_TOPSURF_S4_1, internal
 41290, 41384, 41389, 41435, 41463, 41582
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*Elset, elset=_RIGHT_DISC_TOPSURF_S3_1, internal
 41306, 41328, 41369, 41397, 41405, 41422
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*Surface, type=ELEMENT, name=RIGHT_DISC_TOPSURF
_RIGHT_DISC_TOPSURF_S1_1, S1
_RIGHT_DISC_TOPSURF_S2_1, S2
_RIGHT_DISC_TOPSURF_S4_1, S4
_RIGHT_DISC_TOPSURF_S3_1, S3
** Section: Section-10-RIGHT_DISC
*Solid Section, elset=RIGHT_DISC, controls=EC-1, material=DISC
,
*End Part
**
*Part, name=RIGHT_FOSSA
*Node
      1,  -66.3238983,  -24.2588005,  -37.7858009
      2,  -66.3104019,  -24.4636002,  -39.6223984
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*Element, type=C3D4
1281, 627, 639, 635, 642
1282, 641, 627, 635, 642
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*Elset, elset=RIGHT_FOSSA, generate
 1281,  3894,     1
*Elset, elset=RIGHT_FOSSA_TOP
 1292, 1304, 1314, 1326, 1328, 1329
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*Elset, elset=_RIGHT_FOSSA_S1, internal
 1291, 1294, 1301, 1303, 1304, 1307
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*Elset, elset=_RIGHT_FOSSA_S2, internal
 1281, 1291, 1292, 1305, 1315, 1323
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*Elset, elset=_RIGHT_FOSSA_S3, internal
 1281, 1285, 1286, 1293, 1295, 1298
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*Elset, elset=_RIGHT_FOSSA_S4, internal
 1282, 1283, 1285, 1287, 1288, 1289
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*Elset, elset=_PICKEDSET21, internal, generate
 1281,  3894,     1
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*Elset, elset=_RIGHT_FOSSA_S1_9, internal
 1291, 1294, 1301, 1303, 1304, 1307
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*Elset, elset=_RIGHT_FOSSA_S2_9, internal
 1281, 1291, 1292, 1305, 1315, 1323
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*Elset, elset=_RIGHT_FOSSA_S4_9, internal
 1282, 1283, 1285, 1287, 1288, 1289
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*Elset, elset=_RIGHT_FOSSA_S3_9, internal
 1281, 1285, 1286, 1293, 1295, 1298
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*Surface, type=ELEMENT, name=RIGHT_FOSSA
_RIGHT_FOSSA_S1_9, S1
_RIGHT_FOSSA_S2_9, S2
_RIGHT_FOSSA_S4_9, S4
_RIGHT_FOSSA_S3_9, S3
** Section: Section-11-_PICKEDSET21
*Solid Section, elset=_PICKEDSET21, controls=EC-1, material=CORTICAL
,
*End Part
**
*Part, name=Right-Masseter
*End Part
**
**
** ASSEMBLY
**
*Assembly, name=Assembly
**
*Instance, name=LEFT_FOSSA, part=LEFT_FOSSA
   -1.977301,   -61.149618,    110.08941
   -1.977301,   -61.149618,    110.08941,    -1.977301,   -61.149618,    111.08941,         180.
*End Instance
**
*Instance, name=RIGHT_FOSSA, part=RIGHT_FOSSA
13.524246271759, -54.8571910448109, 112.190468223473
13.524246271759, -54.8571910448109, 112.190468223473, 13.5055748641185, -54.8633077791979, 113.190275216535, 179.017642490022
*End Instance
**
*Instance, name=LEFT_DISC, part=LEFT_DISC
       0.674,        0.674,        0.554
*End Instance
**
*Instance, name=RIGHT_DISC, part=RIGHT_DISC
     -0.5875,       0.5875,       0.7875
*End Instance
**
*Instance, name=LM-in-Pos, part=Left-Masseter
-12.3813345033637, -55.1031174421994, 119.278556556858
-12.3813345033637, -55.1031174421994, 119.278556556858, -12.3807838953249, -55.0716971591099, 120.278062655019, 171.404947500417
*Node
      1,   34.7418518,  -77.9043579,  -115.357323
      2,   41.4343872,   -81.414917,  -54.5677643
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*Element, type=C3D10M
  1,   73,  341,  266,  690, 1068, 1067, 1066, 1070, 1069, 1071
  2,   63,   34,  234,  236, 1074, 1073, 1072, 1076, 1075, 1077
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*Nset, nset=Set-2, generate
    1,  7083,     1
*Elset, elset=Set-2, generate
    1,  4345,     1
*Elset, elset=__PickedSurf17_S4, internal
   45,  109,  608,  949,  977,  992
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*Elset, elset=__PickedSurf17_S3, internal
  327,  440,  573,  596,  682,  722
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*Elset, elset=__PickedSurf17_S2, internal
  349,  909,  916,  943, 1163, 1641
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*Elset, elset=__PickedSurf17_S1, internal
  932,  971, 1204, 1483, 1713, 1782
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*Surface, type=ELEMENT, name=_PickedSurf17, internal
__PickedSurf17_S4, S4
__PickedSurf17_S3, S3
__PickedSurf17_S2, S2
__PickedSurf17_S1, S1
*Elset, elset=_Surf-6_S3, internal
  987,  993, 1073, 1092, 1111, 1115
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*Elset, elset=_Surf-6_S2, internal
 1163, 1223, 1538, 1641, 1713, 2323
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*Elset, elset=_Surf-6_S1, internal
 1204, 1235, 1307, 1343, 1404, 1483
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*Elset, elset=_Surf-6_S4, internal
  992,  996, 1001, 1078, 1401, 1484
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*Surface, type=ELEMENT, name=Surf-6
_Surf-6_S3, S3
_Surf-6_S2, S2
_Surf-6_S4, S4
_Surf-6_S1, S1
*Elset, elset=__PickedSurf31_S4, internal
   2,   8,  10,  11,  45,  74
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*Elset, elset=__PickedSurf31_S3, internal
  19,  23,  27,  48, 101, 132
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*Elset, elset=__PickedSurf31_S2, internal
 102, 266, 271, 274, 346, 349
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*Elset, elset=__PickedSurf31_S1, internal
  19, 261, 272, 277, 312, 393
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*Surface, type=ELEMENT, name=_PickedSurf31, internal
__PickedSurf31_S4, S4
__PickedSurf31_S3, S3
__PickedSurf31_S2, S2
__PickedSurf31_S1, S1
*Elset, elset=__PickedSurf32_S4, internal
   2,   8,  10,  11,  45,  74
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*Elset, elset=__PickedSurf32_S3, internal
  19,  23,  27,  48, 101, 132
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*Elset, elset=__PickedSurf32_S2, internal
 102, 266, 271, 274, 346, 349
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*Elset, elset=__PickedSurf32_S1, internal
  19, 261, 272, 277, 312, 393
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*Surface, type=ELEMENT, name=_PickedSurf32, internal
__PickedSurf32_S4, S4
__PickedSurf32_S3, S3
__PickedSurf32_S2, S2
__PickedSurf32_S1, S1
*Elset, elset=_Surf-9_S4, internal
   2,   8,  10,  11,  45,  74
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*Elset, elset=_Surf-9_S3, internal
  19,  23,  27,  48, 101, 132
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*Elset, elset=_Surf-9_S2, internal
 102, 266, 271, 274, 346, 349
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*Elset, elset=_Surf-9_S1, internal
  19, 261, 272, 277, 312, 393
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*Surface, type=ELEMENT, name=Surf-9
_Surf-9_S4, S4
_Surf-9_S3, S3
_Surf-9_S2, S2
_Surf-9_S1, S1
*Distribution, name=Ori-2-DiscOrient, location=ELEMENT, Table=Ori-2-DiscOrient_Table
** Description: Distribution generated from Discrete Orientation
,           1.,           0.,           0.,           0.,           1.,           0.
1, -0.434038400650024, -0.150547653436661, -0.888226389884949, -0.028700927272439, -0.983127236366272, 0.180657550692558
2, -0.0014218115247786, -0.177602022886276, -0.984101295471191, -0.0180315487086773, -0.983937859535217, 0.17759858071804
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978, -0.130182787775993, -0.244819447398186, -0.960789203643799, -0.419406324625015, -0.864471793174744, 0.277104467153549
*Orientation, name=Ori-2, system=RECTANGULAR
Ori-2-DiscOrient
1, 0.
** Region: (masseter_L:Set-2), (Controls:Default), (Material Orientation:Picked)
*Elset, elset=_I1, internal, generate
   1,  978,    1
** Section: masseter_L
*Solid Section, elset=_I1, orientation=Ori-2, material=MASSETER_L
,
*Distribution, name=Ori-1-DiscOrient, location=ELEMENT, Table=Ori-1-DiscOrient_Table
** Description: Distribution generated from Discrete Orientation
,           1.,           0.,           0.,           0.,           1.,           0.
979, -0.000147702070535161, 0.352539241313934, -0.935797035694122, 0.999973356723785, -0.00678150169551373, -0.00271260063163936
980, -0.00351094454526901, 0.248560905456543, -0.968609869480133, 0.999629497528076, -0.0252704974263906, -0.0101081989705563
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4345, 0.209494024515152, 0.362138271331787, -0.90827751159668, 0.00519750081002712, 0.928464114665985, 0.371385633945465
*Orientation, name=Ori-1, system=RECTANGULAR
Ori-1-DiscOrient
1, 0.
** Region: (masseter_L:Set-2), (Controls:EC-1), (Material Orientation:Picked)
*Elset, elset=_I2, internal, generate
  979,  4345,     1
** Section: masseter_L
*Solid Section, elset=_I2, orientation=Ori-1, controls=EC-1, material=MASSETER_L
,
*End Instance
**
*Instance, name=Right-Masseter-2, part=Right-Masseter
12.1247054644485, -55.1694233976151, 115.611831249555
12.1247054644485, -55.1694233976151, 115.611831249555, 12.0814822444869, -55.1615783435517, 116.610865881853, 183.642761422327
*Node
      1,     -52.3153,  -46.5988998,  -115.843002
      2,  -64.5894012,  -55.2366486,  -55.8374977
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*Element, type=C3D10M
  1,  623,  285,  624,  625,  997,  996,  995,  999,  998, 1000
  2,  623,  626,  627,  628, 1003, 1002, 1001, 1005, 1004, 1006
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*Nset, nset=_PickedSet12, internal, generate
    1,  6604,     1
*Elset, elset=_PickedSet12, internal, generate
    1,  4047,     1
*Elset, elset=__PickedSurf17_S3, internal
  799,  850,  869, 1029, 1115, 1201
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*Elset, elset=__PickedSurf17_S4, internal
  946, 1588, 1590, 1623, 1657, 1691
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*Elset, elset=__PickedSurf17_S2, internal
 1147, 1311, 1437, 1509, 1752, 2354
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*Elset, elset=__PickedSurf17_S1, internal
 1293, 1591, 2129, 2421, 2500, 2959
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*Surface, type=ELEMENT, name=_PickedSurf17, internal
__PickedSurf17_S3, S3
__PickedSurf17_S4, S4
__PickedSurf17_S2, S2
__PickedSurf17_S1, S1
*Elset, elset=__PickedSurf20_S3, internal
  799,  850,  869, 1029, 1115, 1201
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*Elset, elset=__PickedSurf20_S4, internal
  946, 1588, 1590, 1623, 1657, 1691
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*Elset, elset=__PickedSurf20_S2, internal
 1147, 1311, 1437, 1509, 1752, 2354
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*Elset, elset=__PickedSurf20_S1, internal
 1293, 1591, 2129, 2421, 2500, 2959
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*Surface, type=ELEMENT, name=_PickedSurf20, internal
__PickedSurf20_S3, S3
__PickedSurf20_S4, S4
__PickedSurf20_S2, S2
__PickedSurf20_S1, S1
*Elset, elset=__PickedSurf22_S3, internal
  748,  765,  799,  800,  804,  850
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*Elset, elset=__PickedSurf22_S1, internal
  946, 1293, 1437, 1584, 1591, 1865
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*Elset, elset=__PickedSurf22_S4, internal
  946, 1147, 1528, 1588, 1590, 1623
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*Elset, elset=__PickedSurf22_S2, internal
 1147, 1311, 1422, 1437, 1509, 1562
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*Surface, type=ELEMENT, name=_PickedSurf22, internal
__PickedSurf22_S3, S3
__PickedSurf22_S1, S1
__PickedSurf22_S4, S4
__PickedSurf22_S2, S2
*Elset, elset=__PickedSurf27_S3, internal
  738,  748,  756,  765,  783,  799
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*Elset, elset=__PickedSurf27_S2, internal
 1047, 1106, 1147, 1311, 1422, 1437
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*Elset, elset=__PickedSurf27_S1, internal
  946, 1080, 1293, 1437, 1584, 1588
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*Elset, elset=__PickedSurf27_S4, internal
  946, 1147, 1175, 1412, 1528, 1547
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*Surface, type=ELEMENT, name=_PickedSurf27, internal
__PickedSurf27_S3, S3
__PickedSurf27_S2, S2
__PickedSurf27_S4, S4
__PickedSurf27_S1, S1
*Elset, elset=__PickedSurf29_S3, internal
   6,   9,  28,  45,  47,  54
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*Elset, elset=__PickedSurf29_S2, internal
   9,  34, 146, 243, 284, 295
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*Elset, elset=__PickedSurf29_S4, internal
  63, 179, 266, 307, 329, 400
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*Elset, elset=__PickedSurf29_S1, internal
  34, 145, 196, 267, 340, 463
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*Surface, type=ELEMENT, name=_PickedSurf29, internal
__PickedSurf29_S3, S3
__PickedSurf29_S2, S2
__PickedSurf29_S4, S4
__PickedSurf29_S1, S1
*Elset, elset=_Surf-7_S3, internal
  738,  748,  756,  765,  783,  799
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*Elset, elset=_Surf-7_S2, internal
 1047, 1106, 1147, 1311, 1422, 1437
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*Elset, elset=_Surf-7_S1, internal
  946, 1080, 1293, 1437, 1584, 1588
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*Elset, elset=_Surf-7_S4, internal
  946, 1147, 1175, 1412, 1528, 1547
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*Surface, type=ELEMENT, name=Surf-7
_Surf-7_S3, S3
_Surf-7_S2, S2
_Surf-7_S4, S4
_Surf-7_S1, S1
*Elset, elset=_Surf-8_S3, internal
   6,   9,  28,  45,  47,  54
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*Elset, elset=_Surf-8_S2, internal
   9,  34, 146, 243, 284, 295
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*Elset, elset=_Surf-8_S4, internal
  63, 179, 266, 307, 329, 400
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*Elset, elset=_Surf-8_S1, internal
  34, 145, 196, 267, 340, 463
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*Surface, type=ELEMENT, name=Surf-8
_Surf-8_S3, S3
_Surf-8_S2, S2
_Surf-8_S4, S4
_Surf-8_S1, S1
*Distribution, name=Ori-2-DiscOrient-1, location=ELEMENT, Table=Ori-2-DiscOrient-1_Table
** Description: Distribution generated from Discrete Orientation
,           1.,           0.,           0.,           0.,           1.,           0.
1, 0.416658192873001, -0.0998770967125893, -0.903559923171997, -0.255134701728821, 0.941149950027466, -0.221682354807854
2, 0.534114539623261, -0.0510442927479744, -0.843869805335999, -0.277146279811859, 0.932443380355835, -0.231817469000816
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688, 0.22166134417057, 0.365204095840454, -0.904152810573578, -0.828248202800751, -0.418860226869583, -0.372238039970398
*Orientation, name=Ori-2, system=RECTANGULAR
Ori-2-DiscOrient-1
1, 0.
** Region: (masseter_R:Picked), (Controls:Default), (Material Orientation:Picked)
*Elset, elset=_I1, internal, generate
   1,  688,    1
** Section: masseter_R
*Solid Section, elset=_I1, orientation=Ori-2, material=MASSETER_R
,
*Distribution, name=Ori-1-DiscOrient-1, location=ELEMENT, Table=Ori-1-DiscOrient-1_Table
** Description: Distribution generated from Discrete Orientation
,           1.,           0.,           0.,           0.,           1.,           0.
689, 0.0672935619950294, 0.368741005659103, -0.927093029022217, 0.790282428264618, -0.586901068687439, -0.176070347428322
690, 0.134588092565537, 0.175469592213631, -0.975241720676422, 0.640209853649139, 0.735802233219147, 0.22074069082737
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4047, -0.163505047559738, 0.229990690946579, -0.959359347820282, 0.320796698331833, -0.907203316688538, -0.27216100692749
*Orientation, name=Ori-1, system=RECTANGULAR
Ori-1-DiscOrient-1
1, 0.
** Region: (masseter_R:Picked), (Controls:Default), (Material Orientation:Picked)
*Elset, elset=_I2, internal, generate
  689,  4047,     1
** Section: masseter_R
*Solid Section, elset=_I2, orientation=Ori-1, material=MASSETER_R
,
*End Instance
**
*Instance, name=PART-1-1, part=PART-1
*End Instance
**
*Node
      8,  -34.2541237,    4.1454649,  -2.84472609
*Node
      9,  -37.9629097,   12.2841101,   59.7987785
*Node
     10,   -43.032959,  -20.9011707,   51.6393318
*Node
      2,  -37.9629097,   12.2841101,   58.7987785
      3,   37.2972984,  -74.6060486,    -50.45895
      4,   45.6010056,  -75.1709747,  -56.0023537
      5,   41.1447945,  -53.0557899,  -46.8917694
      6,    29.327879,  -72.2617111,  -56.0260315
      7,   -44.788929,   4.26271105,  -1.08513999
      1,          34.,          38.,          12.
*Elset, elset=_CP-1-RIGHT_FOSSA-1_S1, internal, instance=RIGHT_FOSSA
 1291, 1301, 1303, 1311, 1344, 1360
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*Elset, elset=_CP-1-RIGHT_FOSSA-1_S2, internal, instance=RIGHT_FOSSA
 1281, 1315, 1334, 1363, 1398, 1407
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*Elset, elset=_CP-1-RIGHT_FOSSA-1_S3, internal, instance=RIGHT_FOSSA
 1295, 1298, 1305, 1306, 1308, 1312
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*Elset, elset=_CP-1-RIGHT_FOSSA-1_S4, internal, instance=RIGHT_FOSSA
 1285, 1287, 1289, 1290, 1310, 1323
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*Elset, elset=_CP-2-LEFT_FOSSA_S1, internal, instance=LEFT_FOSSA
 1296, 1313, 1318, 1319, 1324, 1364
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*Elset, elset=_CP-2-LEFT_FOSSA_S2, internal, instance=LEFT_FOSSA
 1297, 1312, 1323, 1327, 1339, 1351
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*Nset, nset=_PICKEDSET27, internal
 1,
*Nset, nset=_PICKEDSET29, internal
 1,
*Nset, nset=_PICKEDSET47, internal
 1,
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*Nset, nset=_PickedSet161, internal, instance=RIGHT_FOSSA
   1,   7,  11,  18,  21,  22
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*Nset, nset=_PickedSet161, internal, instance=LEFT_FOSSA
   7,  19,  20,  31,  32,  33
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*Nset, nset=_PickedSet226, internal, instance=PART-1-1
 40872,
*Nset, nset=_PickedSet247, internal, instance=LM-in-Pos
    6,    7,    8,    9,   10,   11
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*Nset, nset=_PickedSet247, internal, instance=Right-Masseter-2
    2,    3,    5,    6,    9,   10
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*Nset, nset=_PickedSet250, internal, instance=PART-1-1
 40872,
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*Elset, elset=_CP-1-RIGHT_FOSSA-1_S1_1, internal, instance=RIGHT_FOSSA
 1291, 1301, 1303, 1311, 1344, 1360
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*Elset, elset=_CP-1-RIGHT_FOSSA-1_S2_1, internal, instance=RIGHT_FOSSA
 1281, 1315, 1334, 1363, 1398, 1407
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*Elset, elset=_CP-1-RIGHT_FOSSA-1_S4_1, internal, instance=RIGHT_FOSSA
 1285, 1287, 1289, 1290, 1310, 1323
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*Elset, elset=_CP-1-RIGHT_FOSSA-1_S3_1, internal, instance=RIGHT_FOSSA
 1295, 1298, 1305, 1306, 1308, 1312
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*Surface, type=ELEMENT, name=CP-1-RIGHT_FOSSA-1
_CP-1-RIGHT_FOSSA-1_S1_1, S1
_CP-1-RIGHT_FOSSA-1_S2_1, S2
_CP-1-RIGHT_FOSSA-1_S4_1, S4
_CP-1-RIGHT_FOSSA-1_S3_1, S3
*Elset, elset=_CP-2-LEFT_FOSSA_S1_1, internal, instance=LEFT_FOSSA
 1296, 1313, 1318, 1319, 1324, 1364
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*Elset, elset=_CP-2-LEFT_FOSSA_S2_1, internal, instance=LEFT_FOSSA
 1297, 1312, 1323, 1327, 1339, 1351
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*Elset, elset=_CP-2-LEFT_FOSSA_S4_1, internal, instance=LEFT_FOSSA
 1285, 1291, 1298, 1329, 1349, 1370
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*Elset, elset=_CP-2-LEFT_FOSSA_S3_1, internal, instance=LEFT_FOSSA
 1303, 1306, 1307, 1316, 1325, 1332
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*Surface, type=ELEMENT, name=CP-2-LEFT_FOSSA
_CP-2-LEFT_FOSSA_S1_1, S1
_CP-2-LEFT_FOSSA_S2_1, S2
_CP-2-LEFT_FOSSA_S4_1, S4
_CP-2-LEFT_FOSSA_S3_1, S3
*Elset, elset=_L_disk_fossa_conct_S1, internal, instance=LEFT_DISC
 90978, 91086, 91143, 91199, 91214, 91254
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*Elset, elset=_L_disk_fossa_conct_S2, internal, instance=LEFT_DISC
 91589, 91903, 92022, 92106, 92134, 92144, 92258, 92509, 92729, 93117, 93125, 93946, 94301
*Elset, elset=_L_disk_fossa_conct_S3, internal, instance=LEFT_DISC
 90914, 90947, 90949, 90952, 90956, 90961
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*Elset, elset=_L_disk_fossa_conct_S4, internal, instance=LEFT_DISC
 90964, 91008, 91009, 91013, 91037, 91093
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*Surface, type=ELEMENT, name=L_disk_fossa_conct
_L_disk_fossa_conct_S1, S1
_L_disk_fossa_conct_S2, S2
_L_disk_fossa_conct_S4, S4
_L_disk_fossa_conct_S3, S3
*Elset, elset=_L_fossa_disk_conct_S1, internal, instance=LEFT_FOSSA
 1296, 1313, 1318, 1319, 1364, 1366
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*Elset, elset=_L_fossa_disk_conct_S2, internal, instance=LEFT_FOSSA
 1297, 1312, 1323, 1327, 1339, 1351
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*Elset, elset=_L_fossa_disk_conct_S3, internal, instance=LEFT_FOSSA
 1303, 1306, 1316, 1325, 1332, 1341
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*Elset, elset=_L_fossa_disk_conct_S4, internal, instance=LEFT_FOSSA
 1285, 1291, 1298, 1329, 1349, 1370
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*Surface, type=ELEMENT, name=L_fossa_disk_conct
_L_fossa_disk_conct_S1, S1
_L_fossa_disk_conct_S2, S2
_L_fossa_disk_conct_S4, S4
_L_fossa_disk_conct_S3, S3
*Elset, elset=_R_disk_fossa_c_S1, internal, instance=RIGHT_DISC
 41410, 41412, 41499, 41501, 41509, 41540
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*Elset, elset=_R_disk_fossa_c_S2, internal, instance=RIGHT_DISC
 41415, 41493, 41567, 41990, 42407, 44616, 44767
*Elset, elset=_R_disk_fossa_c_S3, internal, instance=RIGHT_DISC
 41291, 41306, 41316, 41328, 41342, 41350
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*Elset, elset=_R_disk_fossa_c_S4, internal, instance=RIGHT_DISC
 41290, 41297, 41384, 41389, 41435, 41463
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*Surface, type=ELEMENT, name=R_disk_fossa_c
_R_disk_fossa_c_S1, S1
_R_disk_fossa_c_S2, S2
_R_disk_fossa_c_S4, S4
_R_disk_fossa_c_S3, S3
*Elset, elset=_R_fossa_disk_c_S1, internal, instance=RIGHT_FOSSA
 1303, 1311, 1395, 1427, 1494, 1518
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*Elset, elset=_R_fossa_disk_c_S2, internal, instance=RIGHT_FOSSA
 1281, 1334, 1363, 1398, 1496, 1533
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*Elset, elset=_R_fossa_disk_c_S3, internal, instance=RIGHT_FOSSA
 1295, 1298, 1308, 1312, 1333, 1339
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*Elset, elset=_R_fossa_disk_c_S4, internal, instance=RIGHT_FOSSA
 1285, 1287, 1289, 1290, 1310, 1323
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*Surface, type=ELEMENT, name=R_fossa_disk_c
_R_fossa_disk_c_S1, S1
_R_fossa_disk_c_S2, S2
_R_fossa_disk_c_S4, S4
_R_fossa_disk_c_S3, S3
*Elset, elset=_mand_attach_L_SPOS, internal, instance=PART-1-1
    33,   235,   250,   286,   393,   410
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*Surface, type=ELEMENT, name=mand_attach_L
_mand_attach_L_SPOS, SPOS
*Elset, elset=_manible_R_attatch_SPOS, internal, instance=PART-1-1
   607,   610,   712,   757,  1239,  1378
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*Elset, elset=_manible_R_attatch_E2, internal, instance=PART-1-1
 6548,
*Surface, type=ELEMENT, name=manible_R_attatch
_manible_R_attatch_SPOS, SPOS
_manible_R_attatch_E2, E2
*Elset, elset=_mass_R_attatch_S1, internal, instance=Right-Masseter-2
  463,  476,  484,  495,  618, 1686, 2197
*Elset, elset=_mass_R_attatch_S2, internal, instance=Right-Masseter-2
  243,  655, 2322, 2831, 3521
*Elset, elset=_mass_R_attatch_S3, internal, instance=Right-Masseter-2
  137,  304,  353,  377,  381,  382
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*Elset, elset=_mass_R_attatch_S4, internal, instance=Right-Masseter-2
  428,  546, 3267, 3341, 3886
*Surface, type=ELEMENT, name=mass_R_attatch
_mass_R_attatch_S1, S1
_mass_R_attatch_S2, S2
_mass_R_attatch_S4, S4
_mass_R_attatch_S3, S3
*Elset, elset=_mass_attach_L_S1, internal, instance=LM-in-Pos
 312, 491, 568, 573, 607, 608, 740
*Elset, elset=_mass_attach_L_S2, internal, instance=LM-in-Pos
 468, 487, 571, 712, 713, 725, 743
*Elset, elset=_mass_attach_L_S3, internal, instance=LM-in-Pos
   23,   27,  132,  381,  398,  399
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*Elset, elset=_mass_attach_L_S4, internal, instance=LM-in-Pos
  220,  421,  440,  479,  515,  709
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*Surface, type=ELEMENT, name=mass_attach_L
_mass_attach_L_S1, S1
_mass_attach_L_S2, S2
_mass_attach_L_S4, S4
_mass_attach_L_S3, S3
*Elset, elset=_s_Surf-4_SPOS, internal, instance=PART-1-1
   607,   610,   712,   757,  1378,  1476
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*Surface, type=ELEMENT, name=s_Surf-4
_s_Surf-4_SPOS, SPOS
*Elset, elset=_tie_L_disk_disk_S1, internal, instance=LEFT_DISC
 90993, 91043, 91055, 91071, 91227, 91344
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*Elset, elset=_tie_L_disk_disk_S2, internal, instance=LEFT_DISC
 90985, 91326, 91342, 92555, 92663, 92847, 93294, 93762
*Elset, elset=_tie_L_disk_disk_S3, internal, instance=LEFT_DISC
 90921, 90938, 90971, 90974, 90983, 91042
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*Elset, elset=_tie_L_disk_disk_S4, internal, instance=LEFT_DISC
 90943, 90994, 91179, 91300, 91324, 91396
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*Surface, type=ELEMENT, name=tie_L_disk_disk
_tie_L_disk_disk_S1, S1
_tie_L_disk_disk_S2, S2
_tie_L_disk_disk_S4, S4
_tie_L_disk_disk_S3, S3
*Elset, elset=_tie_L_disk_mand_SPOS, internal, instance=PART-1-1
   384,  1017,  2642,  2796,  4432,  4434
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*Surface, type=ELEMENT, name=tie_L_disk_mand
_tie_L_disk_mand_SPOS, SPOS
*Elset, elset=_tie_R_disk_disk_S1, internal, instance=RIGHT_DISC
 41281, 41286, 41351, 41439, 41470, 41523
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*Elset, elset=_tie_R_disk_disk_S2, internal, instance=RIGHT_DISC
 41610, 42404, 42413, 42477, 42521, 42760, 43193, 43920, 43937, 44078, 44120, 44337, 44636, 45002
*Elset, elset=_tie_R_disk_disk_S3, internal, instance=RIGHT_DISC
 41264, 41289, 41296, 41321, 41332, 41339
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*Elset, elset=_tie_R_disk_disk_S4, internal, instance=RIGHT_DISC
 41322, 41448, 41536, 41539, 41652, 41700
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*Surface, type=ELEMENT, name=tie_R_disk_disk
_tie_R_disk_disk_S1, S1
_tie_R_disk_disk_S2, S2
_tie_R_disk_disk_S4, S4
_tie_R_disk_disk_S3, S3
*Elset, elset=_tie_R_disk_mand_SPOS, internal, instance=PART-1-1
  1628,  1668,  1671,  1676,  1817,  1825
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*Surface, type=ELEMENT, name=tie_R_disk_mand
_tie_R_disk_mand_SPOS, SPOS
*Elset, elset=__PickedSurf160_SPOS, internal, instance=PART-1-1
   607,   610,   712,   757,  1239,  1378
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*Surface, type=ELEMENT, name=_PickedSurf160, internal
__PickedSurf160_SPOS, SPOS
*Elset, elset=__PickedSurf206_SPOS, internal, instance=PART-1-1
   152,   405,  1045,  1163,  1465,  1466
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*Surface, type=ELEMENT, name=_PickedSurf206, internal
__PickedSurf206_SPOS, SPOS
*Rigid Body, ref node=PART-1-1.PART-1-RefPt_, elset=PART-1-1.PART-1,density=2e-9
** Constraint: Constraint-1
*Tie, name=Constraint-1, adjust=yes, position tolerance=2., type=SURFACE TO SURFACE
manible_R_attatch, mass_R_attatch
** Constraint: Constraint-2
*Tie, name=Constraint-2, adjust=yes, position tolerance=2., type=SURFACE TO SURFACE
mand_attach_L, mass_attach_L
** Constraint: Constraint-5
*Tie, name=Constraint-5, adjust=yes
tie_L_disk_mand, tie_L_disk_disk
** Constraint: Constraint-6
*Tie, name=Constraint-6, adjust=yes
tie_R_disk_mand, tie_R_disk_disk
*End Assembly
*Distribution Table, name=Ori-2-DiscOrient_Table
coord3D, coord3D
*Distribution Table, name=Ori-1-DiscOrient_Table
coord3D, coord3D
*Distribution Table, name=Ori-2-DiscOrient-1_Table
coord3D, coord3D
*Distribution Table, name=Ori-1-DiscOrient-1_Table
coord3D, coord3D
**
** ELEMENT CONTROLS
**
*Section Controls, name=EC-1, DISTORTION CONTROL=YES
1., 1., 1.
*Amplitude, name=Amp-1
             0.,              0.,             0.3,              1.
**
** MATERIALS
**
*Material, name=CANCELLOUS
*Density
 5e-09,
*Elastic
1370., 0.3
*Material, name=CORTICAL
*Density
 5e-07,
*Elastic
14500., 0.323
*Material, name=DENTIN
*Density
 5e-09,
*Elastic
18600., 0.31
*Material, name=DISC
*Density
 5e-09,
*Elastic
 30.9, 0.4
*Material, name=ENAMEL
*Density
 5e-09,
*Elastic
80000., 0.33
*Material, name=MASSETER_L
*Density
 5e-09,
*Depvar
     32,
*User Material, constants=19
 0.1424,  0.00386,     2.31, 1.15e-06,      10., 3.57e-08,     42.6,     7.99
     16.6,      0.3,     0.95,     0.45,       3.,     0.15,       4.,       1.
       1.,      0.1,       1.
*Material, name=MASSETER_R
*Density
 5e-09,
*Depvar
     32,
*User Material, constants=19
 0.1424,  0.00386,     2.31, 1.15e-06,      10., 3.57e-08,     42.6,     7.99
     16.6,      0.3,     0.95,     0.45,       3.,     0.15,       4.,       1.
       1.,      0.1,       1.
*Material, name=MUSCLE-TISSUE
*Density
 5e-09,
*Elastic
50000., 0.45
*Material, name=PDL
*Density
 5e-09,
*Elastic
 68.9, 0.45
*Material, name=PULP
*Density
 5e-09,
*Elastic
 2.1, 0.45
*Material, name=RUBBER
*Density
 5e-09,
*Hyperelastic, ogden
 0.672544, 7.26408,      0.
**
** INTERACTION PROPERTIES
**
*Surface Interaction, name=IntProp-2
*Friction
 0.1,
*Surface Behavior, pressure-overclosure=HARD
*Surface Interaction, name=muscle_bone_attatch
*Friction, rough
*Surface Behavior, no separation, pressure-overclosure=HARD
*Surface Interaction, name=no_fric_no_sep
*Friction
0.,
*Surface Behavior, no separation, pressure-overclosure=HARD
**
** BOUNDARY CONDITIONS
**
** Name: Fix_mass_R Type: Symmetry/Antisymmetry/Encastre
*Boundary
_PickedSet247, ENCASTRE
** Name: Fixation_Right-Fossa Type: Symmetry/Antisymmetry/Encastre
*Boundary
_PickedSet161, ENCASTRE
** ----------------------------------------------------------------
**
** STEP: Step-2
**
*Step, name=Step-2, nlgeom=YES
*Dynamic, Explicit, element by element, scale factor=0.8
, 0.837
*Bulk Viscosity
0.06, 1.2
** Mass Scaling: Semi-Automatic
**               Whole Model
*Variable Mass Scaling, dt=5e-06, type=below min, frequency=1
**
** BOUNDARY CONDITIONS
**
** Name: fix_mand Type: Displacement/Rotation
*Boundary
_PickedSet250, 1, 1
_PickedSet250, 2, 2
_PickedSet250, 3, 3
_PickedSet250, 4, 4
_PickedSet250, 5, 5
_PickedSet250, 6, 6
**
** INTERACTIONS
**
** Interaction: Int-3
*Contact Pair, interaction=no_fric_no_sep, mechanical constraint=KINEMATIC, cpset=Int-3
R_fossa_disk_c, R_disk_fossa_c
** Interaction: Int-4
*Contact Pair, interaction=no_fric_no_sep, mechanical constraint=KINEMATIC, cpset=Int-4
L_fossa_disk_conct, L_disk_fossa_conct
** Interaction: Int-2
*Contact, op=NEW
*Contact Inclusions, ALL EXTERIOR
*Contact Exclusions
manible_R_attatch , mass_R_attatch
*Contact Property Assignment
 ,  , IntProp-2
**
** OUTPUT REQUESTS
**
*Restart, write, number interval=1, time marks=NO
**
** FIELD OUTPUT: F-Output-1
**
*Output, field, time interval=0.004185
*Node Output
A, RF, U, V
*Element Output, directions=YES
EDCDEN, EMSF, EVF, LE, PE, PEEQ, PEEQVAVG, PEVAVG, S, SDV, SVAVG
*Contact Output
CSTRESS,
**
** HISTORY OUTPUT: H-Output-1
**
*Output, history, time interval=0.0004185
*Energy Output
ALLAE, ALLCD, ALLCW, ALLDC, ALLDMD, ALLFD, ALLIE, ALLKE, ALLMW, ALLPD, ALLPW, ALLSE, ALLVD, ALLWK, ETOTAL
*Incrementation Output
DMASS,
**
** HISTORY OUTPUT: rf
**
*Output, history, time interval=0.5
*Node Output, nset=PART-1-1.rp
RF1, RF2, RF3, RM, RM1, RM2, RM3
*End Step
